// SBML level 3 version 2

function preprocess(c)
  1*log10(1 + c/1);
end

function heaviside(x)
  piecewise(1, x > 0, 0);
end

model dictyostelium_qs()

  // Compartments:
  compartment SIM_SPACE;

  // Species:
  species Q_IN in SIM_SPACE;
  species CELL in SIM_SPACE;

  // Parameters:
  Q_IN = 0;
  MOVE_DIR = 0;
  MOVE_RQ = 0;
  activator = 0;
  repressor = 0;
  fhn_epsilon = 0;
  fhn_gamma = 0;
  fhn_c = 0;
  cAMP_inflow = 0;
  cAMP_outflow = 0;
  base_amount = 0;
  output_amount = 0;

  // Assignment rules:
  Q_OUT := cAMP_inflow + base_amount + output_amount*heaviside(activator) + (-1*cAMP_outflow*Q_IN);

  // Rate rules:
  activator' = activator + (-0.333333*activator^3) + (-1*repressor) + preprocessor(Q_IN) + stoich();
  repressor' = fhn_epsilon*(activator + (-1*fhn_gamma*repressor) + fhn_c);
end
